<?xml version='1.0' encoding='UTF-8'?>
<neuroml lengthUnits="micrometer" xmlns:xsi="http://www.w3.org/2001/XMLSchema-instance" xmlns="http://morphml.org/neuroml/schema" xmlns:bio="http://morphml.org/biophysics/schema" xmlns:cml="http://morphml.org/channelml/schema" xmlns:meta="http://morphml.org/metadata/schema" xmlns:mml="http://morphml.org/morphml/schema" xmlns:net="http://morphml.org/networkml/schema" xsi:schemaLocation="http://morphml.org/neuroml/schema">
  <meta:notes>Fully instantiated network model of Olfactory Bulb by Aditya Gilra, NCBS, Bangalore, India, 2010.</meta:notes>
<cells xmlns="http://morphml.org/neuroml/schema">
  <cell name="mitral">
    <meta:notes>Cell: soma exported from NEURON ModelView</meta:notes>
    <segments xmlns="http://morphml.org/morphml/schema"> <!-- Changing the namespace from neuroml to morphml-->
<!-- Section: soma -->
      <segment id="0" name="Seg0_soma" cable="0">
        <proximal x="0" y="0" z="0" diameter="32"></proximal>
        <distal x="32" y="0" z="0" diameter="32"></distal>
      </segment>
<!-- Section: sec_dendp4[0] -->
      <segment id="254" name="Seg0_sec_dendp4_0" parent="0" cable="253">  <!-- Connected at 0 on parent section: soma  -->
        <proximal x="0" y="0" z="0" diameter="5.8"></proximal>
        <distal x="0" y="-25.9808" z="15" diameter="5.8"></distal>
      </segment>
<!-- Section: sec_dendp3[0] -->
      <segment id="201" name="Seg0_sec_dendp3_0" parent="0" cable="200">  <!-- Connected at 0 on parent section: soma  -->
        <proximal x="0" y="0" z="0" diameter="5.8"></proximal>
        <distal x="-25.9808" y="3.18173e-15" z="15" diameter="5.8"></distal>
      </segment>
<!-- Section: sec_dendp2[0] -->
      <segment id="158" name="Seg0_sec_dendp2_0" parent="0" cable="157">  <!-- Connected at 0 on parent section: soma  -->
        <proximal x="0" y="0" z="0" diameter="5.8"></proximal>
        <distal x="0" y="25.9808" z="15" diameter="5.8"></distal>
      </segment>
<!-- Section: sec_dendp1[0] -->
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    </segments>
    <cables xmlns="http://morphml.org/morphml/schema"> <!-- Changing namespace from neuroml to morphml-->
      <cable id="0" name="soma" fract_along_parent="0"></cable>
      <cable id="253" name="sec_dendp4_0" fract_along_parent="0"></cable>
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      <cablegroup name="all"> <!-- Replacing subset name ModelViewParmSubset_0 with all, as it contains all sections -->
        <cable id="0"></cable>
        <cable id="253"></cable>
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      </cablegroup>
      <cablegroup name="ModelViewParmSubset_1">
        <cable id="0"></cable>
        <cable id="253"></cable>
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      </cablegroup>
      <cablegroup name="ModelViewParmSubset_2">
        <cable id="0"></cable>
        <cable id="253"></cable>
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      </cablegroup>
      <cablegroup name="ModelViewParmSubset_3">
        <cable id="0"></cable>
        <cable id="1"></cable>
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      </cablegroup>
      <cablegroup name="ModelViewParmSubset_4">
        <cable id="253"></cable>
        <cable id="200"></cable>
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      </cablegroup>
      <cablegroup name="ModelViewParmSubset_5">
        <cable id="110"></cable>
        <cable id="109"></cable>
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      </cablegroup>
      <cablegroup name="ModelViewParmSubset_6">
        <cable id="113"></cable>
        <cable id="100"></cable>
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      </cablegroup>
      <cablegroup name="ModelViewParmSubset_7">
        <cable id="111"></cable>
        <cable id="106"></cable>
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      </cablegroup>
      <cablegroup name="ModelViewParmSubset_8">
        <cable id="105"></cable>
        <cable id="104"></cable>
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      </cablegroup>
      <cablegroup name="ModelViewParmSubset_9">
        <cable id="103"></cable>
        <cable id="94"></cable>
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      </cablegroup>
      <cablegroup name="ModelViewParmSubset_10">
        <cable id="285"></cable>
        <cable id="252"></cable>
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      </cablegroup>
      <cablegroup name="ModelViewParmSubset_11">
        <cable id="284"></cable>
        <cable id="251"></cable>
        <cable id="198"></cable>
        <cable id="155"></cable>
      </cablegroup>
      <cablegroup name="ModelViewParmSubset_12">
        <cable id="283"></cable>
        <cable id="250"></cable>
        <cable id="197"></cable>
        <cable id="154"></cable>
      </cablegroup>
      <cablegroup name="ModelViewParmSubset_13">
        <cable id="5"></cable>
        <cable id="101"></cable>
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      </cablegroup>
      <cablegroup name="ModelViewParmSubset_14">
        <cable id="282"></cable>
        <cable id="249"></cable>
        <cable id="196"></cable>
        <cable id="153"></cable>
      </cablegroup>
      <cablegroup name="ModelViewParmSubset_15">
        <cable id="281"></cable>
        <cable id="248"></cable>
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      </cablegroup>
      <cablegroup name="ModelViewParmSubset_16">
        <cable id="91"></cable>
        <cable id="68"></cable>
        <cable id="44"></cable>
        <cable id="21"></cable>
      </cablegroup>
      <cablegroup name="ModelViewParmSubset_17">
        <cable id="257"></cable>
        <cable id="204"></cable>
        <cable id="161"></cable>
        <cable id="118"></cable>
      </cablegroup>
      <cablegroup name="ModelViewParmSubset_18">
        <cable id="256"></cable>
        <cable id="203"></cable>
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      </cablegroup>
      <cablegroup name="ModelViewParmSubset_19">
        <cable id="117"></cable>
        <cable id="121"></cable>
      </cablegroup>
      <cablegroup name="ModelViewParmSubset_20">
        <cable id="67"></cable>
        <cable id="20"></cable>
      </cablegroup>
      <cablegroup name="ModelViewParmSubset_21">
        <cable id="254"></cable>
        <cable id="201"></cable>
        <cable id="158"></cable>
        <cable id="115"></cable>
      </cablegroup>
      <cablegroup name="ModelViewParmSubset_22">
        <cable id="253"></cable>
        <cable id="200"></cable>
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      </cablegroup>
      <cablegroup name="ModelViewParmSubset_23">
        <cable id="1"></cable>
        <cable id="2"></cable>
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      </cablegroup>
      <cablegroup name="ModelViewParmSubset_24">
        <cable id="14"></cable>
        <cable id="15"></cable>
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      </cablegroup>
      <cablegroup name="ModelViewParmSubset_25">
        <cable id="11"></cable>
        <cable id="12"></cable>
        <cable id="13"></cable>
      </cablegroup>
      <cablegroup name="ModelViewParmSubset_26">
        <cable id="276"></cable>
        <cable id="261"></cable>
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      </cablegroup>
      <cablegroup name="ModelViewParmSubset_27">
        <cable id="253"></cable>
        <cable id="200"></cable>
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      </cablegroup>
      <cablegroup name="ModelViewParmSubset_28">
        <cable id="6"></cable>
        <cable id="7"></cable>
        <cable id="8"></cable>
        <cable id="9"></cable>
      </cablegroup>
      <cablegroup name="ModelViewParmSubset_29">
        <cable id="3"></cable>
        <cable id="4"></cable>
        <cable id="5"></cable>
      </cablegroup>
      <cablegroup name="ModelViewParmSubset_30">
        <cable id="1"></cable>
        <cable id="2"></cable>
      </cablegroup>
      <cablegroup name="ModelViewParmSubset_31">
        <cable id="0"></cable>
        <cable id="67"></cable>
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      </cablegroup>
      <cablegroup name="ModelViewParmSubset_32">
        <cable id="67"></cable>
        <cable id="20"></cable>
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      </cablegroup>
      <cablegroup name="ModelViewParmSubset_33">
        <cable id="12"></cable>
        <cable id="13"></cable>
      </cablegroup>
      <cablegroup name="ModelViewParmSubset_34">
        <cable id="6"></cable>
        <cable id="7"></cable>
      </cablegroup>
      <cablegroup name="OneSecGrp_SectionRef_1"> <!-- Creating a group containing a single section: soma... -->
        <cable id="0"></cable>
      </cablegroup>
      <cablegroup name="OneSecGrp_SectionRef_29"> <!-- Creating a group containing a single section: axon[3]... -->
        <cable id="4"></cable>
      </cablegroup>
      <cablegroup name="OneSecGrp_SectionRef_48"> <!-- Creating a group containing a single section: prim_dend[5]... -->
        <cable id="19"></cable>
      </cablegroup>
      <cablegroup name="OneSecGrp_SectionRef_19"> <!-- Creating a group containing a single section: axon[2]... -->
        <cable id="3"></cable>
      </cablegroup>
      <cablegroup name="OneSecGrp_SectionRef_38"> <!-- Creating a group containing a single section: prim_dend[4]... -->
        <cable id="18"></cable>
      </cablegroup>
      <cablegroup name="OneSecGrp_SectionRef_28"> <!-- Creating a group containing a single section: prim_dend[3]... -->
        <cable id="17"></cable>
      </cablegroup>
      <cablegroup name="OneSecGrp_SectionRef_18"> <!-- Creating a group containing a single section: prim_dend[2]... -->
        <cable id="16"></cable>
      </cablegroup>
      <cablegroup name="OneSecGrp_SectionRef_13"> <!-- Creating a group containing a single section: axon[1]... -->
        <cable id="2"></cable>
      </cablegroup>
      <cablegroup name="OneSecGrp_SectionRef_12"> <!-- Creating a group containing a single section: prim_dend[1]... -->
        <cable id="15"></cable>
      </cablegroup>
      <cablegroup name="OneSecGrp_SectionRef_6"> <!-- Creating a group containing a single section: prim_dend[0]... -->
        <cable id="14"></cable>
      </cablegroup>
      <cablegroup name="OneSecGrp_SectionRef_7"> <!-- Creating a group containing a single section: axon[0]... -->
        <cable id="1"></cable>
      </cablegroup>
      <cablegroup name="OneSecGrp_SectionRef_115"> <!-- Creating a group containing a single section: axon[9]... -->
        <cable id="10"></cable>
      </cablegroup>
      <cablegroup name="OneSecGrp_SectionRef_140"> <!-- Creating a group containing a single section: axon[10]... -->
        <cable id="11"></cable>
      </cablegroup>
      <cablegroup name="OneSecGrp_SectionRef_90"> <!-- Creating a group containing a single section: axon[8]... -->
        <cable id="9"></cable>
      </cablegroup>
      <cablegroup name="OneSecGrp_SectionRef_73"> <!-- Creating a group containing a single section: axon[7]... -->
        <cable id="8"></cable>
      </cablegroup>
    </cables>
  </cell>
</cells>

 <populations xmlns="http://morphml.org/networkml/schema">
    <population cell_type="mitral" name="mitrals">
      <instances size="20">
        <instance id="0">
          <location y="-5.60727696328e-05" x="-0.000575283885757" z="0.0003"></location>
        </instance>
        <instance id="1">
          <location y="-5.78398553836e-05" x="-0.000647771631262" z="0.0003"></location>
        </instance>
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      </instances>
    </population>
    <population cell_type="granule" name="granules">
      <instances size="3182">
        <instance id="0">
          <location y="-8e-06" x="-0.001504" z="0.0"></location>
        </instance>
        <instance id="1">
          <location y="0.00059" x="-0.00149" z="0.0"></location>
        </instance>
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      </instances>
    </population>
  </populations>
  <projections units="SI Units" xmlns="http://morphml.org/networkml/schema">
    <projection source="mitrals" name="singles" target="granules">
      <synapse_props synapse_type="mitral_granule_AMPA"></synapse_props>
      <synapse_props synapse_type="mitral_granule_NMDA"></synapse_props>
      <synapse_props synapse_type="mitral_granule_saturatingAMPA"></synapse_props>
      <synapse_props synapse_type="mitral_granule_saturatingNMDA"></synapse_props>
      <synapse_props synapse_type="mitral_self_GABA"></synapse_props>
      <synapse_props synapse_type="granule_mitral_GABA"></synapse_props>
      <connections size="1615">
        <connection post_cell_id="1" id="0" pre_cell_id="15">
          <properties weight="1.27"></properties>
        </connection>
        <connection post_cell_id="2" id="1" pre_cell_id="4">
          <properties weight="1.29"></properties>
        </connection>
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      </connections>
    </projection>
    <projection source="mitrals" name="joints" target="granules">
      <synapse_props synapse_type="mitral_granule_AMPA"></synapse_props>
      <synapse_props synapse_type="mitral_granule_NMDA"></synapse_props>
      <synapse_props synapse_type="mitral_granule_saturatingAMPA"></synapse_props>
      <synapse_props synapse_type="mitral_granule_saturatingNMDA"></synapse_props>
      <synapse_props synapse_type="mitral_self_GABA"></synapse_props>
      <synapse_props synapse_type="granule_mitral_GABA"></synapse_props>
      <connections size="3134">
        <connection post_cell_id="1616" id="1615" pre_cell_id="2">
          <properties weight="1.3"></properties>
        </connection>
        <connection post_cell_id="1616" id="1616" pre_cell_id="15">
          <properties weight="1.6"></properties>
        </connection>
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      </connections>
    </projection>
  </projections>
</neuroml>
