<networkml length_units="micrometer" xmlns:xsi="http://www.w3.org/2001/XMLSchema-instance" xmlns="http://morphml.org/networkml/schema" xmlns:bio="http://morphml.org/biophysics/schema" xmlns:meta="http://morphml.org/metadata/schema" xmlns:mml="http://morphml.org/morphml/schema"
xsi:schemaLocation="http://morphml.org/networkml/schema F:/computational_neuroscience/neuroML_models/aditya_OB_model/xml/models/NetworkML_v1.8.1.xsd">

    <meta:notes>Olfactory bulb network specifying how to set up cell populations, connections, etc. </meta:notes>

    <populations>
        <population name="mitrals" cell_type="Mitral_Cell">
            <meta:notes>
                test
            </meta:notes>
            <pop_location>
              <random_arrangement>
                <population_size>3</population_size>
                <spherical_location>
                  <center></center>
                </spherical_location>
              </random_arrangement>
            </pop_location>
        </population>
        <population name="granules" cell_type="Granule_Cell">
            <instances size="3">  <!--  All instances listed -->
                <instance id="0"><location x="0" y="100" z="0"></location></instance>
                <instance id="1"><location x="100" y="100" z="0"></location></instance>
                <instance id="2"><location x="200" y="100" z="0"></location></instance>
            </instances>
        </population>
    </populations>

    <projections units="Physiological Units">
        <projection name="NetworkConnection" source="PopA" target="PopB">

            <synapse_props synapse_type="DoubleExpSynapse" internal_delay="5" threshold="-20"></synapse_props>

            <connections><!--  All connection instances specified -->
                <connection id="0" pre_cell_id="0" post_cell_id="1"></connection>
                <connection id="1" pre_cell_id="1" post_cell_id="0">
                    <properties weight="0.5"></properties>        <!--  adjusted value  -->
                </connection>
            </connections>

        </projection>
    </projections>

    <inputs units="SI Units">

        <input name="RandomInput">
            <random_stim frequency="50" synaptic_mechanism="DoubleExpSynapse"></random_stim>
            <target population="PopA">
                <sites>
                    <site cell_id="1"></site>
                    <site cell_id="2"></site>
                </sites>
            </target>
        </input>

    </inputs>

</networkml>
