<?xml version='1.0' encoding='UTF-8'?>
<neuroml xmlns='http://morphml.org/neuroml/schema' xmlns:meta='http://morphml.org/metadata/schema' xmlns:nml='http://morphml.org/networkml/schema' xmlns:bio='http://morphml.org/biophysics/schema' length_units='micrometer' xmlns:cml='http://morphml.org/channelml/schema' xmlns:mml='http://morphml.org/morphml/schema' xmlns:xsi='http://www.w3.org/2001/XMLSchema-instance' xsi:schemaLocation='http://morphml.org/neuroml/schema'>
  <meta:notes>Fully instantiated network model of Olfactory Bulb by Aditya Gilra, NCBS, Bangalore, India, 2010.</meta:notes>
  <cells xmlns='http://morphml.org/neuroml/schema'>
    <cell xmlns='http://morphml.org/neuroml/schema' name='mitral'>
      <meta:notes xmlns:meta='http://morphml.org/metadata/schema'>Cell: soma exported from NEURON ModelView</meta:notes>
      <segments xmlns='http://morphml.org/morphml/schema'>
        <!-- Changing the namespace from neuroml to morphml-->
        <!-- Section: soma -->
        <segment id='0' cable='0' name='Seg0_soma'>
          <proximal y='0' x='0' z='0' diameter='32'/>
          <distal y='0' x='32' z='0' diameter='32'/>
        </segment>
        <!-- Section: sec_dendp4[0] -->
        <segment cable='253' id='254' parent='0' name='Seg0_sec_dendp4_0'>
          <!-- Connected at 0 on parent section: soma  -->
          <proximal y='0' x='0' z='0' diameter='5.8'/>
          <distal y='-25.9808' x='0' z='15' diameter='5.8'/>
        </segment>
        <!-- Section: sec_dendp3[0] -->
        <segment cable='200' id='201' parent='0' name='Seg0_sec_dendp3_0'>
          <!-- Connected at 0 on parent section: soma  -->
          <proximal y='0' x='0' z='0' diameter='5.8'/>
          <distal y='3.18173e-15' x='-25.9808' z='15' diameter='5.8'/>
        </segment>
        <!-- Section: sec_dendp2[0] -->
        <segment cable='157' id='158' parent='0' name='Seg0_sec_dendp2_0'>
          <!-- Connected at 0 on parent section: soma  -->
          <proximal y='0' x='0' z='0' diameter='5.8'/>
          <distal y='25.9808' x='0' z='15' diameter='5.8'/>
        </segment>
        <!-- Section: sec_dendp1[0] -->
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      </segments>
      <cables xmlns='http://morphml.org/morphml/schema'>
        <!-- Changing namespace from neuroml to morphml-->
        <cable fract_along_parent='0' id='0' name='soma'/>
        <cable fract_along_parent='0' id='253' name='sec_dendp4_0'/>
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        <cablegroup name='all'>
          <!-- Replacing subset name ModelViewParmSubset_0 with all, as it contains all sections -->
          <cable id='0'/>
          <cable id='253'/>
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        </cablegroup>
        <cablegroup name='ModelViewParmSubset_1'>
          <cable id='0'/>
          <cable id='253'/>
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        </cablegroup>
        <cablegroup name='ModelViewParmSubset_2'>
          <cable id='0'/>
          <cable id='253'/>
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        </cablegroup>
        <cablegroup name='ModelViewParmSubset_3'>
          <cable id='0'/>
          <cable id='1'/>
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        </cablegroup>
        <cablegroup name='ModelViewParmSubset_4'>
          <cable id='253'/>
          <cable id='200'/>
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        </cablegroup>
        <cablegroup name='ModelViewParmSubset_5'>
          <cable id='110'/>
          <cable id='109'/>
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        </cablegroup>
        <cablegroup name='ModelViewParmSubset_6'>
          <cable id='113'/>
          <cable id='100'/>
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        </cablegroup>
        <cablegroup name='ModelViewParmSubset_7'>
          <cable id='111'/>
          <cable id='106'/>
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        </cablegroup>
        <cablegroup name='ModelViewParmSubset_8'>
          <cable id='105'/>
          <cable id='104'/>
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        </cablegroup>
        <cablegroup name='ModelViewParmSubset_9'>
          <cable id='103'/>
          <cable id='94'/>
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        </cablegroup>
        <cablegroup name='ModelViewParmSubset_10'>
          <cable id='285'/>
          <cable id='252'/>
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        </cablegroup>
        <cablegroup name='ModelViewParmSubset_11'>
          <cable id='284'/>
          <cable id='251'/>
          <cable id='198'/>
          <cable id='155'/>
        </cablegroup>
        <cablegroup name='ModelViewParmSubset_12'>
          <cable id='283'/>
          <cable id='250'/>
          <cable id='197'/>
          <cable id='154'/>
        </cablegroup>
        <cablegroup name='ModelViewParmSubset_13'>
          <cable id='5'/>
          <cable id='101'/>
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        </cablegroup>
        <cablegroup name='ModelViewParmSubset_14'>
          <cable id='282'/>
          <cable id='249'/>
          <cable id='196'/>
          <cable id='153'/>
        </cablegroup>
        <cablegroup name='ModelViewParmSubset_15'>
          <cable id='281'/>
          <cable id='248'/>
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        </cablegroup>
        <cablegroup name='ModelViewParmSubset_16'>
          <cable id='91'/>
          <cable id='68'/>
          <cable id='44'/>
          <cable id='21'/>
        </cablegroup>
        <cablegroup name='ModelViewParmSubset_17'>
          <cable id='257'/>
          <cable id='204'/>
          <cable id='161'/>
          <cable id='118'/>
        </cablegroup>
        <cablegroup name='ModelViewParmSubset_18'>
          <cable id='256'/>
          <cable id='203'/>
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        </cablegroup>
        <cablegroup name='ModelViewParmSubset_19'>
          <cable id='117'/>
          <cable id='121'/>
        </cablegroup>
        <cablegroup name='ModelViewParmSubset_20'>
          <cable id='67'/>
          <cable id='20'/>
        </cablegroup>
        <cablegroup name='ModelViewParmSubset_21'>
          <cable id='254'/>
          <cable id='201'/>
          <cable id='158'/>
          <cable id='115'/>
        </cablegroup>
        <cablegroup name='ModelViewParmSubset_22'>
          <cable id='253'/>
          <cable id='200'/>
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        </cablegroup>
        <cablegroup name='ModelViewParmSubset_23'>
          <cable id='1'/>
          <cable id='2'/>
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        </cablegroup>
        <cablegroup name='ModelViewParmSubset_24'>
          <cable id='14'/>
          <cable id='15'/>
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        </cablegroup>
        <cablegroup name='ModelViewParmSubset_25'>
          <cable id='11'/>
          <cable id='12'/>
          <cable id='13'/>
        </cablegroup>
        <cablegroup name='ModelViewParmSubset_26'>
          <cable id='276'/>
          <cable id='261'/>
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        </cablegroup>
        <cablegroup name='ModelViewParmSubset_27'>
          <cable id='253'/>
          <cable id='200'/>
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        </cablegroup>
        <cablegroup name='ModelViewParmSubset_28'>
          <cable id='6'/>
          <cable id='7'/>
          <cable id='8'/>
          <cable id='9'/>
        </cablegroup>
        <cablegroup name='ModelViewParmSubset_29'>
          <cable id='3'/>
          <cable id='4'/>
          <cable id='5'/>
        </cablegroup>
        <cablegroup name='ModelViewParmSubset_30'>
          <cable id='1'/>
          <cable id='2'/>
        </cablegroup>
        <cablegroup name='ModelViewParmSubset_31'>
          <cable id='0'/>
          <cable id='67'/>
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        </cablegroup>
        <cablegroup name='ModelViewParmSubset_32'>
          <cable id='67'/>
          <cable id='20'/>
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        </cablegroup>
        <cablegroup name='ModelViewParmSubset_33'>
          <cable id='12'/>
          <cable id='13'/>
        </cablegroup>
        <cablegroup name='ModelViewParmSubset_34'>
          <cable id='6'/>
          <cable id='7'/>
        </cablegroup>
        <cablegroup name='OneSecGrp_SectionRef_1'>
          <!-- Creating a group containing a single section: soma... -->
          <cable id='0'/>
        </cablegroup>
        <cablegroup name='OneSecGrp_SectionRef_29'>
          <!-- Creating a group containing a single section: axon[3]... -->
          <cable id='4'/>
        </cablegroup>
        <cablegroup name='OneSecGrp_SectionRef_48'>
          <!-- Creating a group containing a single section: prim_dend[5]... -->
          <cable id='19'/>
        </cablegroup>
        <cablegroup name='OneSecGrp_SectionRef_19'>
          <!-- Creating a group containing a single section: axon[2]... -->
          <cable id='3'/>
        </cablegroup>
        <cablegroup name='OneSecGrp_SectionRef_38'>
          <!-- Creating a group containing a single section: prim_dend[4]... -->
          <cable id='18'/>
        </cablegroup>
        <cablegroup name='OneSecGrp_SectionRef_28'>
          <!-- Creating a group containing a single section: prim_dend[3]... -->
          <cable id='17'/>
        </cablegroup>
        <cablegroup name='OneSecGrp_SectionRef_18'>
          <!-- Creating a group containing a single section: prim_dend[2]... -->
          <cable id='16'/>
        </cablegroup>
        <cablegroup name='OneSecGrp_SectionRef_13'>
          <!-- Creating a group containing a single section: axon[1]... -->
          <cable id='2'/>
        </cablegroup>
        <cablegroup name='OneSecGrp_SectionRef_12'>
          <!-- Creating a group containing a single section: prim_dend[1]... -->
          <cable id='15'/>
        </cablegroup>
        <cablegroup name='OneSecGrp_SectionRef_6'>
          <!-- Creating a group containing a single section: prim_dend[0]... -->
          <cable id='14'/>
        </cablegroup>
        <cablegroup name='OneSecGrp_SectionRef_7'>
          <!-- Creating a group containing a single section: axon[0]... -->
          <cable id='1'/>
        </cablegroup>
        <cablegroup name='OneSecGrp_SectionRef_115'>
          <!-- Creating a group containing a single section: axon[9]... -->
          <cable id='10'/>
        </cablegroup>
        <cablegroup name='OneSecGrp_SectionRef_140'>
          <!-- Creating a group containing a single section: axon[10]... -->
          <cable id='11'/>
        </cablegroup>
        <cablegroup name='OneSecGrp_SectionRef_90'>
          <!-- Creating a group containing a single section: axon[8]... -->
          <cable id='9'/>
        </cablegroup>
        <cablegroup name='OneSecGrp_SectionRef_73'>
          <!-- Creating a group containing a single section: axon[7]... -->
          <cable id='8'/>
        </cablegroup>
      </cables>
    </cell>
    <cell xmlns='http://morphml.org/neuroml/schema' name='granule'>
      <meta:notes xmlns:meta='http://morphml.org/metadata/schema'>Cell: granule morphml written by hand by Aditya.</meta:notes>
      <segments xmlns='http://morphml.org/morphml/schema'>
        <!-- Changing the namespace from neuroml to morphml-->
        <!-- Section: soma -->
        <segment id='0' cable='0' name='soma'>
          <proximal y='0' x='0' z='0' diameter='8'/>
          <distal y='0' x='0' z='8' diameter='8'/>
        </segment>
        <!-- Section: periphery -->
        <segment cable='1' id='1' parent='0' name='periphery'>
          <!-- Connected at 1 on parent section: soma  -->
          <proximal y='0' x='0' z='8' diameter='0.5'/>
          <distal y='0' x='0' z='158' diameter='0.5'/>
        </segment>
      </segments>
      <cables xmlns='http://morphml.org/morphml/schema'>
        <!-- Changing namespace from neuroml to morphml-->
        <cable fract_along_parent='0' id='0' name='soma'/>
        <cable fract_along_parent='1' id='1' name='periphery'/>
        <cablegroup name='all'>
          <cable id='0'/>
          <cable id='1'/>
        </cablegroup>
        <cablegroup name='soma'>
          <cable id='0'/>
        </cablegroup>
        <cablegroup name='periphery'>
          <cable id='1'/>
        </cablegroup>
      </cables>
    </cell>
  </cells>
  <populations xmlns='http://morphml.org/networkml/schema'>
    <population cell_type='mitral' name='mitrals'>
      <instances size='20'>
        <instance id='0'>
          <location y='369.146555966' x='-1088.5177986' z='300.0'/>
        </instance>
        <instance id='1'>
          <location y='331.806858282' x='-1069.53711331' z='300.0'/>
        </instance>
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      </instances>
    </population>
    <population cell_type='granule' name='granules'>
      <instances size='2323'>
        <instance id='0'>
          <location y='1102.0' x='-2764.0' z='0.0'/>
        </instance>
        <instance id='1'>
          <location y='1206.0' x='-2740.0' z='0.0'/>
        </instance>
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      </instances>
    </population>
  </populations>
  <projections units='SI Units' xmlns='http://morphml.org/networkml/schema'>
    <projection source='mitrals' name='singles' target='granules'>
      <synapse_props synapse_type='mitral_granule_AMPA'/>
      <synapse_props synapse_type='mitral_granule_NMDA'/>
      <synapse_props synapse_type='mitral_granule_saturatingAMPA'/>
      <synapse_props synapse_type='mitral_granule_saturatingNMDA'/>
      <synapse_props synapse_type='mitral_self_GABA'/>
      <synapse_props synapse_type='granule_mitral_GABA'/>
      <connections size='1884'>
        <connection post_segment_id='1' post_cell_id='1' pre_segment_id='248' id='0' pre_cell_id='5'>
          <properties weight='1.08'/>
        </connection>
        <connection post_segment_id='1' post_cell_id='2' pre_segment_id='170' id='1' pre_cell_id='4'>
          <properties weight='1.1'/>
        </connection>
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      </connections>
    </projection>
    <projection source='mitrals' name='joints' target='granules'>
      <synapse_props synapse_type='mitral_granule_AMPA'/>
      <synapse_props synapse_type='mitral_granule_NMDA'/>
      <synapse_props synapse_type='mitral_granule_saturatingAMPA'/>
      <synapse_props synapse_type='mitral_granule_saturatingNMDA'/>
      <synapse_props synapse_type='mitral_self_GABA'/>
      <synapse_props synapse_type='granule_mitral_GABA'/>
      <connections size='878'>
        <connection post_segment_id='1' post_cell_id='1885' pre_segment_id='243' id='1884' pre_cell_id='4'>
          <properties weight='1.0'/>
        </connection>
        <connection post_segment_id='1' post_cell_id='1885' pre_segment_id='243' id='1885' pre_cell_id='5'>
          <properties weight='1.0'/>
        </connection>
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      </connections>
    </projection>
  </projections>
</neuroml>
